<neuroml xmlns="http://www.neuroml.org/schema/neuroml2"  xmlns:xs="http://www.w3.org/2001/XMLSchema" xmlns:xsi="http://www.w3.org/2001/XMLSchema-instance" xsi:schemaLocation="http://www.neuroml.org/schema/neuroml2 https://raw.github.com/NeuroML/NeuroML2/development/Schemas/NeuroML2/NeuroML_v2beta5.xsd" id="PyNNGeNNNeuroML">
    <spikeArray id="SpikeArray_input_layer_3_0">
        <spike id="0" time="924.0ms"/>
        <spike id="1" time="2905.0ms"/>
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    </spikeArray>
    <spikeArray id="SpikeArray_input_layer_3_1">
        <spike id="0" time="10.0ms"/>
        <spike id="1" time="210.0ms"/>
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    </spikeArray>
    <spikeArray id="SpikeArray_input_layer_3_2">
        <spike id="0" time="705.0ms"/>
        <spike id="1" time="1619.0ms"/>
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    </spikeArray>
    <spikeArray id="SpikeArray_input_layer_3_3">
        <spike id="0" time="519.0ms"/>
        <spike id="1" time="914.0ms"/>
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    </spikeArray>
    <spikeArray id="SpikeArray_input_layer_3_4">
        <spike id="0" time="617.0ms"/>
        <spike id="1" time="802.0ms"/>
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    </spikeArray>
    <spikeArray id="SpikeArray_input_layer_3_5">
        <spike id="0" time="614.0ms"/>
        <spike id="1" time="1012.0ms"/>
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    </spikeArray>
    <spikeArray id="SpikeArray_input_layer_3_6">
        <spike id="0" time="1206.0ms"/>
        <spike id="1" time="1819.0ms"/>
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    </spikeArray>
    <spikeArray id="SpikeArray_input_layer_3_7">
        <spike id="0" time="223.0ms"/>
        <spike id="1" time="318.0ms"/>
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    </spikeArray>
    <spikeArray id="SpikeArray_input_layer_2_0">
        <spike id="0" time="621.0ms"/>
        <spike id="1" time="1117.0ms"/>
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    </spikeArray>
    <spikeArray id="SpikeArray_input_layer_2_1">
        <spike id="0" time="824.0ms"/>
        <spike id="1" time="1220.0ms"/>
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    </spikeArray>
    <spikeArray id="SpikeArray_input_layer_2_2">
        <spike id="0" time="1109.0ms"/>
        <spike id="1" time="1220.0ms"/>
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    </spikeArray>
    <spikeArray id="SpikeArray_input_layer_2_3">
        <spike id="0" time="1014.0ms"/>
        <spike id="1" time="2816.0ms"/>
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    </spikeArray>
    <spikeArray id="SpikeArray_input_layer_2_4">
        <spike id="0" time="619.0ms"/>
        <spike id="1" time="903.0ms"/>
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    </spikeArray>
    <spikeArray id="SpikeArray_input_layer_2_5">
        <spike id="0" time="301.0ms"/>
        <spike id="1" time="2102.0ms"/>
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    </spikeArray>
    <spikeArray id="SpikeArray_input_layer_2_6">
        <spike id="0" time="822.0ms"/>
        <spike id="1" time="1823.0ms"/>
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    </spikeArray>
    <spikeArray id="SpikeArray_input_layer_2_7">
        <spike id="0" time="1518.0ms"/>
        <spike id="1" time="2104.0ms"/>
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    </spikeArray>
    <spikeArray id="SpikeArray_input_layer_1_0">
        <spike id="0" time="110.0ms"/>
        <spike id="1" time="1217.0ms"/>
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    </spikeArray>
    <spikeArray id="SpikeArray_input_layer_1_1">
        <spike id="0" time="215.0ms"/>
        <spike id="1" time="705.0ms"/>
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    </spikeArray>
    <spikeArray id="SpikeArray_input_layer_1_2">
        <spike id="0" time="316.0ms"/>
        <spike id="1" time="1415.0ms"/>
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    </spikeArray>
    <spikeArray id="SpikeArray_input_layer_1_3">
        <spike id="0" time="120.0ms"/>
        <spike id="1" time="420.0ms"/>
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    </spikeArray>
    <spikeArray id="SpikeArray_input_layer_1_4">
        <spike id="0" time="1609.0ms"/>
        <spike id="1" time="2413.0ms"/>
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    </spikeArray>
    <spikeArray id="SpikeArray_input_layer_1_5">
        <spike id="0" time="1221.0ms"/>
        <spike id="1" time="2307.0ms"/>
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    </spikeArray>
    <spikeArray id="SpikeArray_input_layer_1_6">
        <spike id="0" time="124.0ms"/>
        <spike id="1" time="311.0ms"/>
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    </spikeArray>
    <spikeArray id="SpikeArray_input_layer_1_7">
        <spike id="0" time="504.0ms"/>
        <spike id="1" time="1010.0ms"/>
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    </spikeArray>
    <spikeArray id="SpikeArray_input_layer_0_0">
        <spike id="0" time="24.0ms"/>
        <spike id="1" time="1318.0ms"/>
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    </spikeArray>
    <spikeArray id="SpikeArray_input_layer_0_1">
        <spike id="0" time="408.0ms"/>
        <spike id="1" time="10324.0ms"/>
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    </spikeArray>
    <spikeArray id="SpikeArray_input_layer_0_2">
        <spike id="0" time="204.0ms"/>
        <spike id="1" time="606.0ms"/>
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    </spikeArray>
    <spikeArray id="SpikeArray_input_layer_0_3">
        <spike id="0" time="305.0ms"/>
        <spike id="1" time="404.0ms"/>
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    </spikeArray>
    <spikeArray id="SpikeArray_input_layer_0_4">
        <spike id="0" time="19.0ms"/>
        <spike id="1" time="3113.0ms"/>
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    </spikeArray>
    <spikeArray id="SpikeArray_input_layer_0_5">
        <spike id="0" time="100.0ms"/>
        <spike id="1" time="209.0ms"/>
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    </spikeArray>
    <spikeArray id="SpikeArray_input_layer_0_6">
        <spike id="0" time="111.0ms"/>
        <spike id="1" time="403.0ms"/>
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    </spikeArray>
    <spikeArray id="SpikeArray_input_layer_0_7">
        <spike id="0" time="1512.0ms"/>
        <spike id="1" time="2613.0ms"/>
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    </spikeArray>
    <IF_curr_exp id="IF_curr_exp_mushroom" cm="1." i_offset="0." tau_syn_E="5." tau_syn_I="5." v_init="0." tau_m="20." tau_refrac="0.1" v_reset="-65." v_rest="-65." v_thresh="-50."/>
    <IF_curr_exp id="IF_curr_exp_inh_mushroom" cm="1." i_offset="0." tau_syn_E="5." tau_syn_I="5." v_init="0." tau_m="20." tau_refrac="0.1" v_reset="-65." v_rest="-65." v_thresh="-50."/>
    <IF_curr_exp id="IF_curr_exp_output" cm="1." i_offset="0." tau_syn_E="5." tau_syn_I="5." v_init="0." tau_m="20." tau_refrac="0.1" v_reset="-65." v_rest="-65." v_thresh="-50."/>
    <IF_curr_exp id="IF_curr_exp_inh_output" cm="1." i_offset="0." tau_syn_E="5." tau_syn_I="5." v_init="0." tau_m="20." tau_refrac="0.1" v_reset="-65." v_rest="-65." v_thresh="-50."/>
    <expCurrSynapse id="syn_0" tau_syn="5."/>
    <expCurrSynapse id="syn_1" tau_syn="5."/>
    <expCurrSynapse id="syn_2" tau_syn="5."/>
    <expCurrSynapse id="syn_3" tau_syn="5."/>
    <expCurrSynapse id="syn_4" tau_syn="5."/>
    <expCurrSynapse id="syn_5" tau_syn="5."/>
    <expCurrSynapse id="syn_6" tau_syn="5."/>
    <expCurrSynapse id="syn_7" tau_syn="5."/>
    <expCurrSynapse id="syn_8" tau_syn="5."/>
    <network id="network">
        <population id="SpikeArray_input_layer_3_0_pop" component="SpikeArray_input_layer_3_0" size="1" type="population"/>
        <population id="SpikeArray_input_layer_3_1_pop" component="SpikeArray_input_layer_3_1" size="1" type="population"/>
        <population id="SpikeArray_input_layer_3_2_pop" component="SpikeArray_input_layer_3_2" size="1" type="population"/>
        <population id="SpikeArray_input_layer_3_3_pop" component="SpikeArray_input_layer_3_3" size="1" type="population"/>
        <population id="SpikeArray_input_layer_3_4_pop" component="SpikeArray_input_layer_3_4" size="1" type="population"/>
        <population id="SpikeArray_input_layer_3_5_pop" component="SpikeArray_input_layer_3_5" size="1" type="population"/>
        <population id="SpikeArray_input_layer_3_6_pop" component="SpikeArray_input_layer_3_6" size="1" type="population"/>
        <population id="SpikeArray_input_layer_3_7_pop" component="SpikeArray_input_layer_3_7" size="1" type="population"/>
        <population id="SpikeArray_input_layer_2_0_pop" component="SpikeArray_input_layer_2_0" size="1" type="population"/>
        <population id="SpikeArray_input_layer_2_1_pop" component="SpikeArray_input_layer_2_1" size="1" type="population"/>
        <population id="SpikeArray_input_layer_2_2_pop" component="SpikeArray_input_layer_2_2" size="1" type="population"/>
        <population id="SpikeArray_input_layer_2_3_pop" component="SpikeArray_input_layer_2_3" size="1" type="population"/>
        <population id="SpikeArray_input_layer_2_4_pop" component="SpikeArray_input_layer_2_4" size="1" type="population"/>
        <population id="SpikeArray_input_layer_2_5_pop" component="SpikeArray_input_layer_2_5" size="1" type="population"/>
        <population id="SpikeArray_input_layer_2_6_pop" component="SpikeArray_input_layer_2_6" size="1" type="population"/>
        <population id="SpikeArray_input_layer_2_7_pop" component="SpikeArray_input_layer_2_7" size="1" type="population"/>
        <population id="SpikeArray_input_layer_1_0_pop" component="SpikeArray_input_layer_1_0" size="1" type="population"/>
        <population id="SpikeArray_input_layer_1_1_pop" component="SpikeArray_input_layer_1_1" size="1" type="population"/>
        <population id="SpikeArray_input_layer_1_2_pop" component="SpikeArray_input_layer_1_2" size="1" type="population"/>
        <population id="SpikeArray_input_layer_1_3_pop" component="SpikeArray_input_layer_1_3" size="1" type="population"/>
        <population id="SpikeArray_input_layer_1_4_pop" component="SpikeArray_input_layer_1_4" size="1" type="population"/>
        <population id="SpikeArray_input_layer_1_5_pop" component="SpikeArray_input_layer_1_5" size="1" type="population"/>
        <population id="SpikeArray_input_layer_1_6_pop" component="SpikeArray_input_layer_1_6" size="1" type="population"/>
        <population id="SpikeArray_input_layer_1_7_pop" component="SpikeArray_input_layer_1_7" size="1" type="population"/>
        <population id="SpikeArray_input_layer_0_0_pop" component="SpikeArray_input_layer_0_0" size="1" type="population"/>
        <population id="SpikeArray_input_layer_0_1_pop" component="SpikeArray_input_layer_0_1" size="1" type="population"/>
        <population id="SpikeArray_input_layer_0_2_pop" component="SpikeArray_input_layer_0_2" size="1" type="population"/>
        <population id="SpikeArray_input_layer_0_3_pop" component="SpikeArray_input_layer_0_3" size="1" type="population"/>
        <population id="SpikeArray_input_layer_0_4_pop" component="SpikeArray_input_layer_0_4" size="1" type="population"/>
        <population id="SpikeArray_input_layer_0_5_pop" component="SpikeArray_input_layer_0_5" size="1" type="population"/>
        <population id="SpikeArray_input_layer_0_6_pop" component="SpikeArray_input_layer_0_6" size="1" type="population"/>
        <population id="SpikeArray_input_layer_0_7_pop" component="SpikeArray_input_layer_0_7" size="1" type="population"/>
        <population id="mushroom" component="IF_curr_exp_mushroom" size="8" type="populationList">
            <instance id="0">
                <location x="0." y="0." z="16."/>
            </instance>
            <instance id="1">
                <location x="1." y="0." z="16."/>
            </instance>
            <instance id="2">
                <location x="0." y="1." z="16."/>
            </instance>
            <instance id="3">
                <location x="1." y="1." z="16."/>
            </instance>
            <instance id="4">
                <location x="0." y="2." z="16."/>
            </instance>
            <instance id="5">
                <location x="1." y="2." z="16."/>
            </instance>
            <instance id="6">
                <location x="0." y="3." z="16."/>
            </instance>
            <instance id="7">
                <location x="1." y="3." z="16."/>
            </instance>
        </population>
        <population id="inh_mushroom" component="IF_curr_exp_inh_mushroom" size="8" type="populationList">
            <instance id="0">
                <location x="0." y="0." z="20."/>
            </instance>
            <instance id="1">
                <location x="1." y="0." z="20."/>
            </instance>
            <instance id="2">
                <location x="0." y="1." z="20."/>
            </instance>
            <instance id="3">
                <location x="1." y="1." z="20."/>
            </instance>
            <instance id="4">
                <location x="0." y="2." z="20."/>
            </instance>
            <instance id="5">
                <location x="1." y="2." z="20."/>
            </instance>
            <instance id="6">
                <location x="0." y="3." z="20."/>
            </instance>
            <instance id="7">
                <location x="1." y="3." z="20."/>
            </instance>
        </population>
        <population id="output" component="IF_curr_exp_output" size="8" type="populationList">
            <instance id="0">
                <location x="0." y="0." z="24."/>
            </instance>
            <instance id="1">
                <location x="1." y="0." z="24."/>
            </instance>
            <instance id="2">
                <location x="0." y="1." z="24."/>
            </instance>
            <instance id="3">
                <location x="1." y="1." z="24."/>
            </instance>
            <instance id="4">
                <location x="0." y="2." z="24."/>
            </instance>
            <instance id="5">
                <location x="1." y="2." z="24."/>
            </instance>
            <instance id="6">
                <location x="0." y="3." z="24."/>
            </instance>
            <instance id="7">
                <location x="1." y="3." z="24."/>
            </instance>
        </population>
        <population id="inh_output" component="IF_curr_exp_inh_output" size="1" type="populationList">
            <instance id="0">
                <location x="0." y="0." z="28."/>
            </instance>
        </population>
        <projection id="SpikeArray_input_layer_0_0_pop_to_mushroom" presynapticPopulation="SpikeArray_input_layer_0_0_pop" postsynapticPopulation="mushroom" synapse="syn_0">
            <connection id="0" preCellId="../SpikeArray_input_layer_0_0_pop/0/SpikeArray_input_layer_0_0" postCellId="../mushroom/0/IF_curr_exp_mushroom"/>
        </projection>
        <projection id="SpikeArray_input_layer_0_3_pop_to_mushroom" presynapticPopulation="SpikeArray_input_layer_0_3_pop" postsynapticPopulation="mushroom" synapse="syn_0">
            <connection id="0" preCellId="../SpikeArray_input_layer_0_3_pop/0/SpikeArray_input_layer_0_3" postCellId="../mushroom/1/IF_curr_exp_mushroom"/>
        </projection>
        <projection id="SpikeArray_input_layer_0_7_pop_to_mushroom" presynapticPopulation="SpikeArray_input_layer_0_7_pop" postsynapticPopulation="mushroom" synapse="syn_0">
            <connection id="0" preCellId="../SpikeArray_input_layer_0_7_pop/0/SpikeArray_input_layer_0_7" postCellId="../mushroom/1/IF_curr_exp_mushroom"/>
        </projection>
        <projection id="SpikeArray_input_layer_0_5_pop_to_mushroom" presynapticPopulation="SpikeArray_input_layer_0_5_pop" postsynapticPopulation="mushroom" synapse="syn_0">
            <connection id="0" preCellId="../SpikeArray_input_layer_0_5_pop/0/SpikeArray_input_layer_0_5" postCellId="../mushroom/1/IF_curr_exp_mushroom"/>
        </projection>
        <projection id="SpikeArray_input_layer_0_2_pop_to_mushroom" presynapticPopulation="SpikeArray_input_layer_0_2_pop" postsynapticPopulation="mushroom" synapse="syn_0">
            <connection id="0" preCellId="../SpikeArray_input_layer_0_2_pop/0/SpikeArray_input_layer_0_2" postCellId="../mushroom/2/IF_curr_exp_mushroom"/>
        </projection>
        <projection id="SpikeArray_input_layer_0_6_pop_to_mushroom" presynapticPopulation="SpikeArray_input_layer_0_6_pop" postsynapticPopulation="mushroom" synapse="syn_0">
            <connection id="0" preCellId="../SpikeArray_input_layer_0_6_pop/0/SpikeArray_input_layer_0_6" postCellId="../mushroom/2/IF_curr_exp_mushroom"/>
        </projection>
        <projection id="SpikeArray_input_layer_0_0_pop_to_mushroom" presynapticPopulation="SpikeArray_input_layer_0_0_pop" postsynapticPopulation="mushroom" synapse="syn_0">
            <connection id="0" preCellId="../SpikeArray_input_layer_0_0_pop/0/SpikeArray_input_layer_0_0" postCellId="../mushroom/2/IF_curr_exp_mushroom"/>
        </projection>
        <projection id="SpikeArray_input_layer_0_7_pop_to_mushroom" presynapticPopulation="SpikeArray_input_layer_0_7_pop" postsynapticPopulation="mushroom" synapse="syn_0">
            <connection id="0" preCellId="../SpikeArray_input_layer_0_7_pop/0/SpikeArray_input_layer_0_7" postCellId="../mushroom/2/IF_curr_exp_mushroom"/>
        </projection>
        <projection id="SpikeArray_input_layer_0_5_pop_to_mushroom" presynapticPopulation="SpikeArray_input_layer_0_5_pop" postsynapticPopulation="mushroom" synapse="syn_0">
            <connection id="0" preCellId="../SpikeArray_input_layer_0_5_pop/0/SpikeArray_input_layer_0_5" postCellId="../mushroom/2/IF_curr_exp_mushroom"/>
        </projection>
        <projection id="SpikeArray_input_layer_0_3_pop_to_mushroom" presynapticPopulation="SpikeArray_input_layer_0_3_pop" postsynapticPopulation="mushroom" synapse="syn_0">
            <connection id="0" preCellId="../SpikeArray_input_layer_0_3_pop/0/SpikeArray_input_layer_0_3" postCellId="../mushroom/2/IF_curr_exp_mushroom"/>
        </projection>
        <projection id="SpikeArray_input_layer_0_5_pop_to_mushroom" presynapticPopulation="SpikeArray_input_layer_0_5_pop" postsynapticPopulation="mushroom" synapse="syn_0">
            <connection id="0" preCellId="../SpikeArray_input_layer_0_5_pop/0/SpikeArray_input_layer_0_5" postCellId="../mushroom/3/IF_curr_exp_mushroom"/>
        </projection>
        <projection id="SpikeArray_input_layer_0_4_pop_to_mushroom" presynapticPopulation="SpikeArray_input_layer_0_4_pop" postsynapticPopulation="mushroom" synapse="syn_0">
            <connection id="0" preCellId="../SpikeArray_input_layer_0_4_pop/0/SpikeArray_input_layer_0_4" postCellId="../mushroom/3/IF_curr_exp_mushroom"/>
        </projection>
        <projection id="SpikeArray_input_layer_0_1_pop_to_mushroom" presynapticPopulation="SpikeArray_input_layer_0_1_pop" postsynapticPopulation="mushroom" synapse="syn_0">
            <connection id="0" preCellId="../SpikeArray_input_layer_0_1_pop/0/SpikeArray_input_layer_0_1" postCellId="../mushroom/3/IF_curr_exp_mushroom"/>
        </projection>
        <projection id="SpikeArray_input_layer_0_6_pop_to_mushroom" presynapticPopulation="SpikeArray_input_layer_0_6_pop" postsynapticPopulation="mushroom" synapse="syn_0">
            <connection id="0" preCellId="../SpikeArray_input_layer_0_6_pop/0/SpikeArray_input_layer_0_6" postCellId="../mushroom/4/IF_curr_exp_mushroom"/>
        </projection>
        <projection id="SpikeArray_input_layer_0_2_pop_to_mushroom" presynapticPopulation="SpikeArray_input_layer_0_2_pop" postsynapticPopulation="mushroom" synapse="syn_0">
            <connection id="0" preCellId="../SpikeArray_input_layer_0_2_pop/0/SpikeArray_input_layer_0_2" postCellId="../mushroom/4/IF_curr_exp_mushroom"/>
        </projection>
        <projection id="SpikeArray_input_layer_0_4_pop_to_mushroom" presynapticPopulation="SpikeArray_input_layer_0_4_pop" postsynapticPopulation="mushroom" synapse="syn_0">
            <connection id="0" preCellId="../SpikeArray_input_layer_0_4_pop/0/SpikeArray_input_layer_0_4" postCellId="../mushroom/4/IF_curr_exp_mushroom"/>
        </projection>
        <projection id="SpikeArray_input_layer_0_2_pop_to_mushroom" presynapticPopulation="SpikeArray_input_layer_0_2_pop" postsynapticPopulation="mushroom" synapse="syn_0">
            <connection id="0" preCellId="../SpikeArray_input_layer_0_2_pop/0/SpikeArray_input_layer_0_2" postCellId="../mushroom/5/IF_curr_exp_mushroom"/>
        </projection>
        <projection id="SpikeArray_input_layer_0_7_pop_to_mushroom" presynapticPopulation="SpikeArray_input_layer_0_7_pop" postsynapticPopulation="mushroom" synapse="syn_0">
            <connection id="0" preCellId="../SpikeArray_input_layer_0_7_pop/0/SpikeArray_input_layer_0_7" postCellId="../mushroom/5/IF_curr_exp_mushroom"/>
        </projection>
        <projection id="SpikeArray_input_layer_0_4_pop_to_mushroom" presynapticPopulation="SpikeArray_input_layer_0_4_pop" postsynapticPopulation="mushroom" synapse="syn_0">
            <connection id="0" preCellId="../SpikeArray_input_layer_0_4_pop/0/SpikeArray_input_layer_0_4" postCellId="../mushroom/5/IF_curr_exp_mushroom"/>
        </projection>
        <projection id="SpikeArray_input_layer_0_6_pop_to_mushroom" presynapticPopulation="SpikeArray_input_layer_0_6_pop" postsynapticPopulation="mushroom" synapse="syn_0">
            <connection id="0" preCellId="../SpikeArray_input_layer_0_6_pop/0/SpikeArray_input_layer_0_6" postCellId="../mushroom/5/IF_curr_exp_mushroom"/>
        </projection>
        <projection id="SpikeArray_input_layer_0_2_pop_to_mushroom" presynapticPopulation="SpikeArray_input_layer_0_2_pop" postsynapticPopulation="mushroom" synapse="syn_0">
            <connection id="0" preCellId="../SpikeArray_input_layer_0_2_pop/0/SpikeArray_input_layer_0_2" postCellId="../mushroom/6/IF_curr_exp_mushroom"/>
        </projection>
        <projection id="SpikeArray_input_layer_0_4_pop_to_mushroom" presynapticPopulation="SpikeArray_input_layer_0_4_pop" postsynapticPopulation="mushroom" synapse="syn_0">
            <connection id="0" preCellId="../SpikeArray_input_layer_0_4_pop/0/SpikeArray_input_layer_0_4" postCellId="../mushroom/6/IF_curr_exp_mushroom"/>
        </projection>
        <projection id="SpikeArray_input_layer_0_7_pop_to_mushroom" presynapticPopulation="SpikeArray_input_layer_0_7_pop" postsynapticPopulation="mushroom" synapse="syn_0">
            <connection id="0" preCellId="../SpikeArray_input_layer_0_7_pop/0/SpikeArray_input_layer_0_7" postCellId="../mushroom/6/IF_curr_exp_mushroom"/>
        </projection>
        <projection id="SpikeArray_input_layer_0_5_pop_to_mushroom" presynapticPopulation="SpikeArray_input_layer_0_5_pop" postsynapticPopulation="mushroom" synapse="syn_0">
            <connection id="0" preCellId="../SpikeArray_input_layer_0_5_pop/0/SpikeArray_input_layer_0_5" postCellId="../mushroom/7/IF_curr_exp_mushroom"/>
        </projection>
        <projection id="SpikeArray_input_layer_0_2_pop_to_mushroom" presynapticPopulation="SpikeArray_input_layer_0_2_pop" postsynapticPopulation="mushroom" synapse="syn_0">
            <connection id="0" preCellId="../SpikeArray_input_layer_0_2_pop/0/SpikeArray_input_layer_0_2" postCellId="../mushroom/7/IF_curr_exp_mushroom"/>
        </projection>
        <projection id="SpikeArray_input_layer_0_0_pop_to_mushroom" presynapticPopulation="SpikeArray_input_layer_0_0_pop" postsynapticPopulation="mushroom" synapse="syn_0">
            <connection id="0" preCellId="../SpikeArray_input_layer_0_0_pop/0/SpikeArray_input_layer_0_0" postCellId="../mushroom/7/IF_curr_exp_mushroom"/>
        </projection>
        <projection id="SpikeArray_input_layer_0_6_pop_to_mushroom" presynapticPopulation="SpikeArray_input_layer_0_6_pop" postsynapticPopulation="mushroom" synapse="syn_0">
            <connection id="0" preCellId="../SpikeArray_input_layer_0_6_pop/0/SpikeArray_input_layer_0_6" postCellId="../mushroom/7/IF_curr_exp_mushroom"/>
        </projection>
        <projection id="SpikeArray_input_layer_0_7_pop_to_mushroom" presynapticPopulation="SpikeArray_input_layer_0_7_pop" postsynapticPopulation="mushroom" synapse="syn_0">
            <connection id="0" preCellId="../SpikeArray_input_layer_0_7_pop/0/SpikeArray_input_layer_0_7" postCellId="../mushroom/7/IF_curr_exp_mushroom"/>
        </projection>
        <projection id="projection_4" presynapticPopulation="mushroom" postsynapticPopulation="output" synapse="syn_4">
            <connection id="4" preCellId="../mushroom/6/IF_curr_exp_mushroom" postCellId="../output/5/IF_curr_exp_output"/>
        </projection>
        <projection id="projection_5" presynapticPopulation="mushroom" postsynapticPopulation="inh_mushroom" synapse="syn_5">
            <connection id="5" preCellId="../mushroom/0/IF_curr_exp_mushroom" postCellId="../inh_mushroom/0/IF_curr_exp_inh_mushroom"/>
            <connection id="5" preCellId="../mushroom/1/IF_curr_exp_mushroom" postCellId="../inh_mushroom/0/IF_curr_exp_inh_mushroom"/>
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        </projection>
        <projection id="projection_6" presynapticPopulation="inh_mushroom" postsynapticPopulation="mushroom" synapse="syn_6">
            <connection id="6" preCellId="../inh_mushroom/0/IF_curr_exp_inh_mushroom" postCellId="../mushroom/0/IF_curr_exp_mushroom"/>
            <connection id="6" preCellId="../inh_mushroom/0/IF_curr_exp_inh_mushroom" postCellId="../mushroom/1/IF_curr_exp_mushroom"/>
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        </projection>
        <projection id="projection_7" presynapticPopulation="output" postsynapticPopulation="inh_output" synapse="syn_7">
            <connection id="7" preCellId="../output/0/IF_curr_exp_output" postCellId="../inh_output/0/IF_curr_exp_inh_output"/>
            <connection id="7" preCellId="../output/1/IF_curr_exp_output" postCellId="../inh_output/0/IF_curr_exp_inh_output"/>
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        </projection>
        <projection id="projection_8" presynapticPopulation="inh_output" postsynapticPopulation="output" synapse="syn_8">
            <connection id="8" preCellId="../inh_output/0/IF_curr_exp_inh_output" postCellId="../output/0/IF_curr_exp_output"/>
            <connection id="8" preCellId="../inh_output/0/IF_curr_exp_inh_output" postCellId="../output/1/IF_curr_exp_output"/>
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        </projection>
    </network>
</neuroml>
