<neuroml xmlns="http://www.neuroml.org/schema/neuroml2"  xmlns:xs="http://www.w3.org/2001/XMLSchema" xmlns:xsi="http://www.w3.org/2001/XMLSchema-instance" xsi:schemaLocation="http://www.neuroml.org/schema/neuroml2 https://raw.github.com/NeuroML/NeuroML2/development/Schemas/NeuroML2/NeuroML_v2beta5.xsd" id="PyNN_NeuroML2_Export">
    <IF_cond_alpha id="IF_cond_alpha_pop_post2" cm="1." i_offset="0." tau_syn_E="5." tau_syn_I="0.5" v_init="-65." tau_m="20." tau_refrac="10." v_reset="-62." v_rest="-65." v_thresh="-52." e_rev_E="0." e_rev_I="-70."/>
    <EIF_cond_exp_isfa_ista id="EIF_cond_exp_isfa_ista_pop_EIF_cond_exp_isfa_ista" cm="0.281" i_offset="0.6" tau_syn_E="5." tau_syn_I="5." v_init="-70.599999999999994" tau_m="9.3667" tau_refrac="0." v_reset="-68." v_rest="-70.599999999999994" v_thresh="-52." e_rev_E="0." e_rev_I="-80." a="0." b="0.0805" delta_T="2." tau_w="144." v_spike="-40."/>
    <alphaCondSynapse id="syn__pop_EIF_cond_exp_isfa_ista__TO__pop_post2" tau_syn="5." e_rev="0."/>
    <network id="PyNN_NeuroML2_Export">
        <population id="pop_EIF_cond_exp_isfa_ista" component="EIF_cond_exp_isfa_ista_pop_EIF_cond_exp_isfa_ista" size="1" type="populationList">
            <instance id="0">
                <location x="0." y="0." z="0."/>
            </instance>
        </population>
        <population id="pop_post2" component="IF_cond_alpha_pop_post2" size="1" type="populationList">
            <instance id="0">
                <location x="0." y="0." z="0."/>
            </instance>
        </population>
        <projection id="pop_EIF_cond_exp_isfa_ista__TO__pop_post2" presynapticPopulation="pop_EIF_cond_exp_isfa_ista" postsynapticPopulation="pop_post2" synapse="syn__pop_EIF_cond_exp_isfa_ista__TO__pop_post2">
            <connectionWD id="0" preCellId="../pop_EIF_cond_exp_isfa_ista/0/EIF_cond_exp_isfa_ista_pop_EIF_cond_exp_isfa_ista" postCellId="../pop_post2/0/IF_cond_alpha_pop_post2" weight="0.005" delay="20.0ms"/>
        </projection>
    </network>
</neuroml>
